<!DOCTYPE autopilot SYSTEM "autopilot.dtd">

<autopilot name="Atlas VTOL">

  <state_machine name="ap" freq="PERIODIC_FREQUENCY" gcs_mode="true" settings_mode="true" settings_handler="autopilot_generated|SetModeHandler">

    <modules>
      <module name="nav" type="rotorcraft"/>
      <module name="control_mixing" type="atlas"/>
      <module name="guidance" type="indi_hybrid_tiltrotor"/>
      <module name="stabilization" type="indi"/>
    </modules>

    <includes>
      <include name="generated/airframe.h"/>
      <include name="autopilot_rc_helpers.h"/>
      <include name="modules/radio_control/radio_control.h"/>
      <include name="modules/gps/gps.h"/>
      <define name="MODE_MANUAL" value="AP_MODE_MANUAL" cond="ifndef MODE_MANUAL"/>
      <define name="MODE_AUTO1" value="AP_MODE_ATTITUDE_Z_HOLD" cond="ifndef MODE_AUTO1"/>
      <define name="MODE_AUTO2" value="AP_MODE_NAV" cond="ifndef MODE_AUTO2"/>
    </includes>

    <settings>
      <dl_setting var="autopilot.kill_throttle" min="0" step="1" max="1" module="autopilot" values="Resurrect|Kill" handler="KillThrottle"/>
      <dl_setting var="autopilot_mode_auto2" min="2" step="1" max="3" module="autopilot" values="GUIDED|NAV"/>
    </settings>

    <mode_selection>
      <mode_select cond="RCMode0()" mode="MODE_MANUAL"/>
      <mode_select cond="RCMode1()" mode="MODE_AUTO1"/>
      <mode_select cond="RCMode2()" mode="autopilot_mode_auto2" exception="HOME"/>
    </mode_selection>

    <exceptions>
      <exception cond="nav.too_far_from_home" deroute="HOME"/>
      <exception cond="kill_switch_is_on()" deroute="KILL"/>
    </exceptions>

    <!-- RC Mode 0: INDI quad stabilization (TILT_L/TILT_R = 0) -->
    <mode name="MANUAL" shortname="QUAD">
      <on_enter>
        <call fun="control_mixing_atlas_quad_enter()"/>
      </on_enter>
      <control freq="NAVIGATION_FREQUENCY">
        <call fun="nav_periodic_task()"/>
      </control>
      <control>
        <call fun="control_mixing_atlas_quad()"/>
      </control>
      <exception cond="RadioControlIsLost()" deroute="FAILSAFE"/>
    </mode>

    <!-- RC Mode 1: INDI quad attitude + altitude hold (TILT_L/TILT_R = 0) -->
    <mode name="ATTITUDE_Z_HOLD" shortname="A_ZH">
      <on_enter>
        <call fun="control_mixing_atlas_quad_enter()"/>
        <call fun="guidance_v_mode_changed(GUIDANCE_V_MODE_HOVER)"/>
      </on_enter>
      <control freq="NAVIGATION_FREQUENCY">
        <call fun="nav_periodic_task()"/>
      </control>
      <control>
        <call fun="control_mixing_atlas_quad()"/>
      </control>
      <exception cond="RadioControlIsLost()" deroute="FAILSAFE"/>
    </mode>

    <!-- RC Mode 2: Guided by GCS setpoints -->
    <mode name="GUIDED">
      <on_enter>
        <call fun="control_mixing_atlas_guidance_enter()"/>
        <call fun="guidance_h_mode_changed(GUIDANCE_H_MODE_GUIDED)"/>
        <call fun="guidance_v_mode_changed(GUIDANCE_V_MODE_GUIDED)"/>
      </on_enter>
      <control freq="NAVIGATION_FREQUENCY">
        <call fun="nav_periodic_task()"/>
      </control>
      <control>
        <call fun="control_mixing_atlas_guidance()"/>
      </control>
      <exception cond="GpsIsLost() && autopilot_in_flight()" deroute="FAILSAFE"/>
    </mode>

    <!-- RC Mode 2: Autonomous flight plan -->
    <mode name="NAV">
      <on_enter>
        <call fun="control_mixing_atlas_guidance_enter()"/>
        <call fun="guidance_h_mode_changed(GUIDANCE_H_MODE_NAV)"/>
        <call fun="guidance_v_mode_changed(GUIDANCE_V_MODE_NAV)"/>
      </on_enter>
      <control freq="NAVIGATION_FREQUENCY">
        <call fun="nav_periodic_task()"/>
      </control>
      <control>
        <call fun="control_mixing_atlas_nav()"/>
      </control>
      <exception cond="GpsIsLost() && autopilot_in_flight()" deroute="FAILSAFE"/>
    </mode>

    <!-- Return to home -->
    <mode name="HOME">
      <on_enter>
        <call fun="control_mixing_atlas_guidance_enter()"/>
        <call fun="guidance_h_mode_changed(GUIDANCE_H_MODE_NAV)"/>
        <call fun="guidance_v_mode_changed(GUIDANCE_V_MODE_NAV)"/>
      </on_enter>
      <control freq="NAVIGATION_FREQUENCY">
        <call fun="nav_home()"/>
      </control>
      <control>
        <call fun="control_mixing_atlas_nav()"/>
      </control>
      <exception cond="GpsIsLost()" deroute="FAILSAFE"/>
    </mode>

    <!-- Failsafe: level hover with controlled descent -->
    <mode name="FAILSAFE" shortname="FAIL">
      <on_enter>
        <call fun="guidance_h_mode_changed(GUIDANCE_H_MODE_NONE)"/>
        <call fun="guidance_v_mode_changed(GUIDANCE_V_MODE_CLIMB)"/>
        <call fun="stabilization_mode_changed(STABILIZATION_MODE_ATTITUDE, STABILIZATION_ATT_SUBMODE_HEADING)"/>
        <call fun="guidance_v_set_vz(FAILSAFE_DESCENT_SPEED)"/>
      </on_enter>
      <control>
        <call fun="control_mixing_atlas_failsafe()"/>
      </control>
      <exception cond="!GpsIsLost()" deroute="$LAST_MODE"/>
    </mode>

    <!-- Kill throttle -->
    <mode name="KILL">
      <select cond="$DEFAULT_MODE"/>
      <select cond="kill_switch_is_on()"/>
      <on_enter>
        <call fun="guidance_h_mode_changed(GUIDANCE_H_MODE_NONE)"/>
        <call fun="stabilization_mode_changed(STABILIZATION_MODE_NONE, 0)"/>
        <call fun="guidance_v_mode_changed(GUIDANCE_V_MODE_KILL)"/>
        <call fun="autopilot_set_in_flight(false)"/>
        <call fun="autopilot_set_motors_on(false)"/>
      </on_enter>
      <control>
        <call fun="SetCommands(commands_failsafe)"/>
      </control>
    </mode>

  </state_machine>

</autopilot>

<!--<!DOCTYPE autopilot SYSTEM "autopilot.dtd">-->

<!--<autopilot name="Atlas VTOL">-->

<!--  <state_machine name="ap" freq="PERIODIC_FREQUENCY" gcs_mode="true" settings_mode="true" settings_handler="autopilot_generated|SetModeHandler">-->

<!--    <modules>-->
<!--      <module name="nav" type="rotorcraft"/>-->
<!--      <module name="control_mixing" type="atlas"/>-->
<!--      <module name="guidance" type="indi_hybrid_tiltrotor"/>-->
<!--      <module name="stabilization" type="indi"/>-->
<!--    </modules>-->

<!--    <includes>-->
<!--      <include name="generated/airframe.h"/>-->
<!--      <include name="autopilot_rc_helpers.h"/>-->
<!--      <include name="modules/radio_control/radio_control.h"/>-->
<!--      <include name="modules/gps/gps.h"/>-->
<!--      <define name="MODE_MANUAL" value="AP_MODE_MANUAL" cond="ifndef MODE_MANUAL"/>-->
<!--      <define name="MODE_AUTO1" value="AP_MODE_GUIDED" cond="ifndef MODE_AUTO1"/>-->
<!--      <define name="MODE_AUTO2" value="AP_MODE_NAV" cond="ifndef MODE_AUTO2"/>-->
<!--    </includes>-->

<!--    <settings>-->
<!--      <dl_setting var="autopilot.kill_throttle" min="0" step="1" max="1" module="autopilot" values="Resurrect|Kill" handler="KillThrottle"/>-->
<!--      <dl_setting var="autopilot_mode_auto2" min="1" step="1" max="2" module="autopilot" values="GUIDED|NAV"/>-->
<!--    </settings>-->

<!--    <mode_selection>-->
<!--      <mode_select cond="RCMode0()" mode="MODE_MANUAL"/>-->
<!--      <mode_select cond="RCMode1()" mode="MODE_AUTO1"/>-->
<!--      <mode_select cond="RCMode2()" mode="autopilot_mode_auto2" exception="HOME"/>-->
<!--    </mode_selection>-->

<!--    <exceptions>-->
<!--      <exception cond="nav.too_far_from_home" deroute="HOME"/>-->
<!--      <exception cond="kill_switch_is_on()" deroute="KILL"/>-->
<!--    </exceptions>-->

<!--    &lt;!&ndash; RC Mode 0: INDI quad stabilization (TILT_L/TILT_R = 0) &ndash;&gt;-->
<!--    <mode name="MANUAL" shortname="QUAD">-->
<!--      <on_enter>-->
<!--        <call fun="control_mixing_atlas_quad_enter()"/>-->
<!--      </on_enter>-->
<!--      <control freq="NAVIGATION_FREQUENCY">-->
<!--        <call fun="nav_periodic_task()"/>-->
<!--      </control>-->
<!--      <control>-->
<!--        <call fun="control_mixing_atlas_quad()"/>-->
<!--      </control>-->
<!--      <exception cond="RadioControlIsLost()" deroute="FAILSAFE"/>-->
<!--    </mode>-->

<!--    &lt;!&ndash; RC Mode 1 (and AUTO2 option): Guided by GCS setpoints &ndash;&gt;-->
<!--    <mode name="GUIDED">-->
<!--      <on_enter>-->
<!--        <call fun="control_mixing_atlas_guidance_enter()"/>-->
<!--        <call fun="guidance_h_mode_changed(GUIDANCE_H_MODE_GUIDED)"/>-->
<!--        <call fun="guidance_v_mode_changed(GUIDANCE_V_MODE_GUIDED)"/>-->
<!--      </on_enter>-->
<!--      <control freq="NAVIGATION_FREQUENCY">-->
<!--        <call fun="nav_periodic_task()"/>-->
<!--      </control>-->
<!--      <control>-->
<!--        <call fun="control_mixing_atlas_guidance()"/>-->
<!--      </control>-->
<!--      <exception cond="GpsIsLost() && autopilot_in_flight()" deroute="FAILSAFE"/>-->
<!--    </mode>-->

<!--    &lt;!&ndash; RC Mode 2: Autonomous flight plan &ndash;&gt;-->
<!--    <mode name="NAV">-->
<!--      <on_enter>-->
<!--        <call fun="control_mixing_atlas_guidance_enter()"/>-->
<!--        <call fun="guidance_h_mode_changed(GUIDANCE_H_MODE_NAV)"/>-->
<!--        <call fun="guidance_v_mode_changed(GUIDANCE_V_MODE_NAV)"/>-->
<!--      </on_enter>-->
<!--      <control freq="NAVIGATION_FREQUENCY">-->
<!--        <call fun="nav_periodic_task()"/>-->
<!--      </control>-->
<!--      <control>-->
<!--        <call fun="control_mixing_atlas_guidance()"/>-->
<!--      </control>-->
<!--      <exception cond="GpsIsLost() && autopilot_in_flight()" deroute="FAILSAFE"/>-->
<!--    </mode>-->

<!--    &lt;!&ndash; Return to home &ndash;&gt;-->
<!--    <mode name="HOME">-->
<!--      <on_enter>-->
<!--        <call fun="control_mixing_atlas_guidance_enter()"/>-->
<!--        <call fun="guidance_h_mode_changed(GUIDANCE_H_MODE_NAV)"/>-->
<!--        <call fun="guidance_v_mode_changed(GUIDANCE_V_MODE_NAV)"/>-->
<!--      </on_enter>-->
<!--      <control freq="NAVIGATION_FREQUENCY">-->
<!--        <call fun="nav_home()"/>-->
<!--      </control>-->
<!--      <control>-->
<!--        <call fun="control_mixing_atlas_guidance()"/>-->
<!--      </control>-->
<!--      <exception cond="GpsIsLost()" deroute="FAILSAFE"/>-->
<!--    </mode>-->

<!--    &lt;!&ndash; Failsafe: level hover with controlled descent &ndash;&gt;-->
<!--    <mode name="FAILSAFE" shortname="FAIL">-->
<!--      <on_enter>-->
<!--        <call fun="guidance_h_mode_changed(GUIDANCE_H_MODE_NONE)"/>-->
<!--        <call fun="guidance_v_mode_changed(GUIDANCE_V_MODE_CLIMB)"/>-->
<!--        <call fun="stabilization_mode_changed(STABILIZATION_MODE_ATTITUDE, STABILIZATION_ATT_SUBMODE_HEADING)"/>-->
<!--        <call fun="guidance_v_set_vz(FAILSAFE_DESCENT_SPEED)"/>-->
<!--      </on_enter>-->
<!--      <control>-->
<!--        <call fun="control_mixing_atlas_failsafe()"/>-->
<!--      </control>-->
<!--      <exception cond="!GpsIsLost()" deroute="$LAST_MODE"/>-->
<!--    </mode>-->

<!--    &lt;!&ndash; Kill throttle &ndash;&gt;-->
<!--    <mode name="KILL">-->
<!--      <select cond="$DEFAULT_MODE"/>-->
<!--      <select cond="kill_switch_is_on()"/>-->
<!--      <on_enter>-->
<!--        <call fun="guidance_h_mode_changed(GUIDANCE_H_MODE_NONE)"/>-->
<!--        <call fun="stabilization_mode_changed(STABILIZATION_MODE_NONE, 0)"/>-->
<!--        <call fun="guidance_v_mode_changed(GUIDANCE_V_MODE_KILL)"/>-->
<!--        <call fun="autopilot_set_in_flight(false)"/>-->
<!--        <call fun="autopilot_set_motors_on(false)"/>-->
<!--      </on_enter>-->
<!--      <control>-->
<!--        <call fun="SetCommands(commands_failsafe)"/>-->
<!--      </control>-->
<!--    </mode>-->

<!--  </state_machine>-->

<!--</autopilot>-->
