<!DOCTYPE autopilot SYSTEM "autopilot.dtd">

<autopilot name="Colibri autopilot">

  <state_machine name="ap" freq="PERIODIC_FREQUENCY" gcs_mode="true" settings_mode="true" settings_handler="autopilot_generated|SetModeHandler">

    <includes>
      <include name="generated/airframe.h"/>
      <include name="autopilot.h"/>
      <include name="autopilot_rc_helpers.h"/>
      <include name="navigation.h"/>
      <include name="guidance.h"/>
      <include name="stabilization/stabilization_attitude.h"/>
      <include name="modules/radio_control/radio_control.h"/>
      <include name="modules/gps/gps.h"/>
      <include name="modules/actuators/actuators.h"/>
      <define name="MODE_AUTO2" value="AP_MODE_NAV" cond="ifndef MODE_AUTO2"/>
      <define name="HOVERWIND" value="AP_TEST" />
      <define name="RCLost()" value="(radio_control.status == RC_REALLY_LOST)"/>
      <define name="DLModeNav()" value="(autopilot_mode_auto2 == AP_MODE_NAV)"/>
      <define name="DLModeForward()" value="(autopilot_mode_auto2 == AP_MODE_FORWARD)"/>
      <define name="DLModeHover()" value="(autopilot_mode_auto2 == AP_MODE_HOVERWIND)"/>
      <define name="DLModeGuided()" value="(autopilot_mode_auto2 == AP_MODE_GUIDED)"/>
    </includes>

    <settings>
      <dl_setting var="autopilot.kill_throttle" min="0" step="1" max="1" module="autopilot" values="Resurrect|Kill" handler="KillThrottle"/>
      <dl_setting var="autopilot_mode_auto2" min="2" step="1" max="5" module="autopilot" values="_|_|NAV|FORWARD|HOVERWIND|GUIDED"/>
    </settings>

    <control_block name="set_commands">
      <call fun="SetRotorcraftCommands(stabilization_cmd, autopilot_in_flight(), autopilot_get_motors_on())"/>
    </control_block>

    <control_block name="attitude_loop">
      <!-- <call fun="guidance_h_transition_run(FALSE)"/> -->
      <call fun="stabilization_attitude_read_rc(autopilot_in_flight(), FALSE, FALSE)"/>
      <call fun="stabilization_attitude_run(autopilot_in_flight())"/>
    </control_block>

    <control_block name="forward_loop">
      <!-- <call fun="guidance_h_transition_run(TRUE)"/> -->
      <call fun="stabilization_attitude_read_rc(autopilot_in_flight(), FALSE, TRUE)"/>
      <call fun="stabilization_attitude_run(autopilot_in_flight())"/>
    </control_block>

    <control_block name="throttle_direct">
      <call fun="guidance_v_read_rc()"/>
      <call fun="guidance_v_set_z(stateGetPositionNed_i()->z)"/>
      <call fun="stabilization_cmd[COMMAND_THRUST] = guidance_v.rc_delta_t"/>
    </control_block>

    <control_block name="altitude_loop">
      <call fun="gv_update_ref_from_z_sp(guidance_v.z_sp)"/>
      <call fun="guidance_v.delta_t = guidance_v_run_pos(autopilot_in_flight(), &guidance_v)"/>
      <call fun="stabilization_cmd[COMMAND_THRUST] = guidance_v.rc_delta_t"/>
      <!--call fun="SaturateThrottle(rc_values)"/-->
    </control_block>

    <exceptions>
      <exception cond="nav.too_far_from_home" deroute="HOME"/>
      <exception cond="kill_switch_is_on()" deroute="KILL"/>
    </exceptions>

    <!-- 0 -->
    <mode name="ATTITUDE_DIRECT" shortname="ATT">
      <select cond="RCMode0()"/>
      <on_enter>
        <call fun="stabilization_attitude_enter()"/>
      </on_enter>
      <control freq="NAVIGATION_FREQUENCY">
        <call fun="nav_periodic_task()"/>
      </control>
      <control>
        <call_block name="attitude_loop"/>
        <call_block name="throttle_direct"/>
        <call_block name="set_commands"/>
      </control>
      <exception cond="RCLost()" deroute="FAILSAFE"/>
    </mode>

     <!-- 1 -->
    <mode name="ATTITUDE_Z_HOLD" shortname="A_ZH">
      <!--select cond="RCMode1()"/-->
      <on_enter>
        <call fun="stabilization_attitude_enter()"/>
        <call fun="guidance_v_z_enter()"/>
      </on_enter>
      <control freq="NAVIGATION_FREQUENCY">
        <call fun="nav_periodic_task()"/>
      </control>
      <control>
        <call_block name="attitude_loop"/>
        <call_block name="altitude_loop"/>
        <call_block name="set_commands"/>
      </control>
      <exception cond="RCLost()" deroute="FAILSAFE"/>
    </mode>

     <!-- 2 -->
    <mode name="FORWARD" shortname="FWD">
      <select cond="RCMode2() && DLModeForward()"/>
      <on_enter>
        <call fun="stabilization_attitude_enter()"/>
      </on_enter>
      <control freq="NAVIGATION_FREQUENCY">
        <call fun="nav_periodic_task()"/>
      </control>
      <control>
        <call_block name="forward_loop"/>
        <call_block name="throttle_direct"/>
        <call_block name="set_commands"/>
      </control>
      <exception cond="RCLost()" deroute="FAILSAFE"/>
    </mode>

     <!-- 3 -->
    <mode name="NAV">
      <select cond="RCMode2() && DLModeNav()" exception="HOME"/>
      <on_enter>
        <call fun="guidance_h_nav_enter()"/>
        <call fun="stabilization_attitude_enter()"/>
        <call fun="guidance_v_z_enter()"/>
      </on_enter>
      <control freq="NAVIGATION_FREQUENCY">
        <call fun="nav_periodic_task()"/>
      </control>
      <control>
        <call fun="guidance_v_read_rc()"/>
        <call fun="guidance_v_thrust_adapt(autopilot_in_flight())"/>
        <call fun="guidance_v_from_nav(autopilot_in_flight())"/>
        <call fun="guidance_h_from_nav(autopilot_in_flight())"/>
        <call_block name="set_commands"/>
      </control>
      <exception cond="GpsIsLost() && autopilot_in_flight()" deroute="FAILSAFE"/>
    </mode>

     <!-- 4 -->
    <mode name="HOVERWIND">

      <select cond="RCMode1()" exception="HOME"/> <!---->
      <!--select cond="RCMode2() && DLModeHover()" exception="HOME"/-->
      <on_enter>
        <call fun="stabilization_hover_wind_init()"/>
        <!-- <call fun="ctrl_hover_nonlin_init()"/> -->
      </on_enter>
      <control freq="NAVIGATION_FREQUENCY">
        <call fun="nav_periodic_task()"/>
      </control>
      <control>
        <call fun="stabilization_hover_wind_run(autopilot_in_flight())"/>
        <!-- <call fun="ctrl_hover_nonlin_run(autopilot_in_flight())"/> -->
        <call_block name="set_commands"/>
      </control>
      <!--exception cond="RCLost()" deroute="FAILSAFE"/-->
    </mode>

     <!-- 5 -->
    <mode name="GUIDED">
      <select cond="RCMode2() && DLModeGuided()" exception="HOME"/>
      <on_enter>
        <call fun="guidance_h_hover_enter()"/>
        <call fun="stabilization_attitude_enter()"/>
        <call fun="guidance_v.mode = GUIDANCE_V_MODE_GUIDED"/>
        <call fun="guidance_v_guided_enter()"/>
      </on_enter>
      <control freq="NAVIGATION_FREQUENCY">
        <call fun="nav_periodic_task()"/>
      </control>
      <control>
        <call fun="guidance_v_read_rc()"/>
        <call fun="guidance_v_thrust_adapt(autopilot_in_flight())"/>
        <call fun="guidance_v_guided_run(autopilot_in_flight())"/>
        <call fun="guidance_h_guided_run(autopilot_in_flight())"/>
        <call_block name="set_commands"/>
      </control>
      <exception cond="GpsIsLost() && autopilot_in_flight()" deroute="FAILSAFE"/>
    </mode>

     <!-- 6 -->
    <mode name="HOME">
      <on_enter>
        <call fun="guidance_h_nav_enter()"/>
        <call fun="stabilization_attitude_enter()"/>
        <call fun="guidance_v_z_enter()"/>
      </on_enter>
      <control freq="NAVIGATION_FREQUENCY">
        <call fun="nav_home()"/>
      </control>
      <control>
        <call fun="guidance_v_read_rc()"/>
        <call fun="guidance_v_thrust_adapt(autopilot_in_flight())"/>
        <call fun="guidance_v_from_nav(autopilot_in_flight())"/>
        <call fun="guidance_h_from_nav(autopilot_in_flight())"/>
        <call_block name="set_commands"/>
      </control>
      <exception cond="GpsIsLost()" deroute="FAILSAFE"/>
    </mode>


     <!-- 7 -->
    <!-- Safe landing -->
    <mode name="FAILSAFE" shortname="FAIL">
      <on_enter>
        <call fun="stabilization_attitude_set_failsafe_setpoint()"/>
        <call fun="guidance_v_mode_changed(GUIDANCE_V_MODE_CLIMB)"/>
        <call fun="guidance_v_set_z(SPEED_BFP_OF_REAL(FAILSAFE_DESCENT_SPEED))"/>
      </on_enter>
      <control>
        <call fun="stabilization_attitude_set_failsafe_setpoint()"/>
        <call fun="stabilization_attitude_run(autopilot_in_flight())"/>
        <call fun="gv_update_ref_from_zd_sp(guidance_v.zd_sp, stateGetPositionNed_i()->z)"/>
        <call fun="guidance_v_update_ref()"/>
        <call fun="guidance_v.delta_t = guidance_v_run_speed(autopilot_in_flight(), &guidance_v)"/>
        <call fun="stabilization_cmd[COMMAND_THRUST] = guidance_v.rc_delta_t"/>
        <call_block name="set_commands"/>
      </control>
      <exception cond="!GpsIsLost()" deroute="$LAST_MODE"/>
    </mode>

     <!-- 8 -->
    <!-- Kill throttle mode -->
    <mode name="KILL">
      <select cond="$DEFAULT_MODE"/>
      <select cond="kill_switch_is_on()"/>
      <on_enter>
        <call fun="autopilot_set_in_flight(false)"/>
        <call fun="autopilot_set_motors_on(false)"/>
        <call fun="stabilization_cmd[COMMAND_THRUST] = 0"/>
      </on_enter>
      <control>
        <call fun="SetCommands(commands_failsafe)"/>
      </control>
    </mode>

  </state_machine>

</autopilot>
