<!DOCTYPE autopilot SYSTEM "autopilot.dtd">

<autopilot name="Octave Autopilot">

  <state_machine name="ap" freq="PERIODIC_FREQUENCY" gcs_mode="true" settings_mode="true" settings_handler="autopilot_generated|SetModeHandler">

    <includes>
      <include name="generated/airframe.h"/>
      <include name="autopilot.h"/>
      <include name="autopilot_rc_helpers.h"/>
      <include name="navigation.h"/>
      <include name="guidance.h"/>
      <include name="stabilization.h"/>
      <include name="modules/radio_control/radio_control.h"/>
      <include name="modules/gps/gps.h"/>
      <include name="modules/actuators/actuators.h"/>
      <!-- <include name="modules/actuators/motor_mixing.h"/> -->
      <include name="firmwares/rotorcraft/stabilization/stabilization_udwadia.h"/>

      <define name="MODE_AUTO2" value="AP_MODE_NAV" cond="ifndef MODE_AUTO2"/>
      <define name="RCLost()" value="(radio_control.status == RC_REALLY_LOST)"/>
      <define name="DLModeNav()" value="(autopilot_mode_auto2 == AP_MODE_NAV)"/>
      <define name="DLModeGuided()" value="(autopilot_mode_auto2 == AP_MODE_GUIDED)"/>
    </includes>

    <settings>
      <dl_setting var="autopilot.kill_throttle" min="0" step="1" max="1" module="autopilot" values="Resurrect|Kill" handler="KillThrottle"/>
      <dl_setting var="autopilot_mode_auto2" min="2" step="1" max="3" module="autopilot" values="NAV|GUIDED"/>
    </settings>

    <!-- <control_block name="set_commands">
      <call fun="SetRotorcraftCommands(stabilization.cmd, autopilot_in_flight(), autopilot_get_motors_on())"/>
    </control_block> -->

    <control_block name="run_attitude_control">
      <call fun="guidance_v_run(autopilot_in_flight())" store="struct ThrustSetpoint thrust_sp"/>
      <call fun="stabilization_run(autopilot_in_flight(), &stabilization.rc_sp, &thrust_sp, stabilization.cmd)"/>
    </control_block>

    <exceptions>
      <exception cond="nav.too_far_from_home" deroute="HOME"/>
      <exception cond="kill_switch_is_on()" deroute="KILL"/>
    </exceptions>

    <mode name="ATTITUDE_DIRECT" shortname="ATT">
      <select cond="$DEFAULT_MODE"/>
      <select cond="RCMode0()"/>
      <on_enter>
        <call fun="guidance_h_mode_changed(GUIDANCE_H_MODE_NONE)"/>
        <call fun="guidance_v_mode_changed(GUIDANCE_V_MODE_RC_DIRECT)"/>
        <call fun="stabilization_mode_changed(STABILIZATION_MODE_ATTITUDE, STABILIZATION_ATT_SUBMODE_HEADING)"/>
      </on_enter>
      <control freq="NAVIGATION_FREQUENCY">
        <call fun="nav_periodic_task()"/>
      </control>
      <control>
        <call_block name="run_attitude_control"/>
        <!-- <call_block name="set_commands"/> -->
      </control>
      <exception cond="RCLost()" deroute="FAILSAFE"/>
    </mode>

    <mode name="ATTITUDE_Z_HOLD" shortname="A_ZH">
      <select cond="RCMode1()"/>
      <on_enter>
      </on_enter>
      <control freq="NAVIGATION_FREQUENCY">
      </control>
      <control>
      </control>
      <exception cond="RCLost()" deroute="FAILSAFE"/>
    </mode>

    <mode name="NAV">
      <select cond="RCMode2() && DLModeNav()" exception="HOME"/>
      <on_enter>
      </on_enter>
      <control>
      </control>
      <exception cond="GpsIsLost() && autopilot_in_flight()" deroute="FAILSAFE"/>
    </mode>

    <mode name="GUIDED">
      <select cond="RCMode2() && DLModeGuided()" exception="HOME"/>
      <on_enter>

      </on_enter>
      <control freq="NAVIGATION_FREQUENCY">
      </control>
      <control>
      </control>
      <exception cond="GpsIsLost() && autopilot_in_flight()" deroute="FAILSAFE"/>
    </mode>

    <mode name="HOME">
      <on_enter>
      </on_enter>
      <control freq="NAVIGATION_FREQUENCY">
      </control>
      <control>
      </control>
      <exception cond="GpsIsLost()" deroute="FAILSAFE"/>
    </mode>

    <!-- Safe landing -->
    <mode name="FAILSAFE" shortname="FAIL">
      <on_enter>
      </on_enter>
      <control>
      </control>
      <exception cond="!GpsIsLost()" deroute="$LAST_MODE"/>
    </mode>

    <!-- Kill throttle mode -->
    <mode name="KILL">
      <select cond="kill_switch_is_on()"/>
      <on_enter>
        <call fun="guidance_h_mode_changed(GUIDANCE_H_MODE_NONE)"/>
        <call fun="stabilization_mode_changed(STABILIZATION_MODE_NONE, 0)"/>
        <call fun="guidance_v_mode_changed(GUIDANCE_V_MODE_KILL)"/>
        <call fun="autopilot_set_in_flight(false)"/>
        <call fun="autopilot_set_motors_on(false)"/>
        <!--call fun="stabilization.cmd[COMMAND_THRUST] = 0"/-->
      </on_enter>
      <control>
        <call fun="SetCommands(commands_failsafe)"/>
      </control>
    </mode>

  </state_machine>

</autopilot>
