<!DOCTYPE autopilot SYSTEM "autopilot.dtd">

<autopilot name="Autopilot for fully actuated rotorcraft">

  <state_machine name="ap" freq="PERIODIC_FREQUENCY" gcs_mode="true" settings_mode="true" settings_handler="autopilot_generated|SetModeHandler">

    <modules>
      <module name="nav" type="rotorcraft"/>
      <module name="guidance" type="rotorcraft"/>
      <module name="guidance" type="indi_fully_actuated"/>
      <module name="stabilization" type="rotorcraft"/>
    </modules>

    <includes>
      <include name="generated/airframe.h"/>
      <include name="autopilot_rc_helpers.h"/>
      <include name="modules/radio_control/radio_control.h"/>
      <include name="modules/gps/gps.h"/>
      <define name="MODE_MANUAL" value="AP_MODE_ATTITUDE_DIRECT" cond="ifndef MODE_MANUAL"/>
      <define name="MODE_AUTO1" value="AP_MODE_DIRECT" cond="ifndef MODE_AUTO1"/>
      <define name="MODE_AUTO2" value="AP_MODE_NAV" cond="ifndef MODE_AUTO2"/>
    </includes>

    <settings>
      <dl_setting var="autopilot.kill_throttle" min="0" step="1" max="1" module="autopilot" values="Resurrect|Kill" handler="KillThrottle"/>
      <dl_setting var="autopilot_mode_auto2" min="3" step="1" max="5" module="autopilot" values="NAV|GUIDED|DIRECT"/>
    </settings>

    <control_block name="set_commands">
      <call fun="SetRotorcraftCommands(stabilization.cmd, autopilot_in_flight(), autopilot_get_motors_on())"/>
    </control_block>

    <control_block name="run_attitude_control">
      <call fun="guidance_v_run(autopilot_in_flight())" store="struct ThrustSetpoint thrust_sp"/>
      <call fun="stabilization_run(autopilot_in_flight(), &stabilization.rc_sp, &thrust_sp, stabilization.cmd)"/>
    </control_block>

    <control_block name="run_attitude_fully_actuated">
      <call fun="guidance_v_run(autopilot_in_flight())" store="struct ThrustSetpoint thrust_sp"/>
      <call fun="guidance_set_rc_h_thrust(&thrust_sp)" store="struct ThrustSetpoint thrust_sp"/>
      <call fun="guidance_set_rc_h_att(&stabilization.rc_sp)" store="struct StabilizationSetpoint h_att"/>
      <call fun="stabilization_run(autopilot_in_flight(), &h_att, &thrust_sp, stabilization.cmd)"/>
    </control_block>

    <control_block name="run_guidance_control">
      <call fun="guidance_v_run(autopilot_in_flight())" store="struct ThrustSetpoint thrust_sp"/>
      <call fun="guidance_h_run(autopilot_in_flight())" store="struct StabilizationSetpoint stab_sp"/>
      <call fun="stabilization_run(autopilot_in_flight(), &stab_sp, &thrust_sp, stabilization.cmd)"/>
    </control_block>

    <mode_selection>
      <mode_select cond="RCMode0()" mode="MODE_MANUAL"/>
      <mode_select cond="RCMode1()" mode="MODE_AUTO1"/>
      <mode_select cond="RCMode2()" mode="autopilot_mode_auto2" exception="HOME"/>
    </mode_selection>

    <exceptions>
      <exception cond="nav.too_far_from_home" deroute="HOME"/>
      <exception cond="kill_switch_is_on()" deroute="KILL"/>
    </exceptions>

    <mode name="ATTITUDE_DIRECT" shortname="ATT">
      <on_enter>
        <call fun="guidance_h_mode_changed(GUIDANCE_H_MODE_NONE)"/>
        <call fun="guidance_v_mode_changed(GUIDANCE_V_MODE_RC_DIRECT)"/>
        <call fun="stabilization_mode_changed(STABILIZATION_MODE_ATTITUDE, STABILIZATION_ATT_SUBMODE_HEADING)"/>
      </on_enter>
      <control freq="NAVIGATION_FREQUENCY">
        <call fun="nav_periodic_task()"/>
      </control>
      <control>
        <call_block name="run_attitude_control"/>
        <call_block name="set_commands"/>
      </control>
      <exception cond="RadioControlIsLost()" deroute="FAILSAFE"/>
    </mode>

    <mode name="ATTITUDE_FULLY_ACTUATED" shortname="A_FA">
      <on_enter>
        <call fun="guidance_h_mode_changed(GUIDANCE_H_MODE_NONE)"/>
        <call fun="guidance_v_mode_changed(GUIDANCE_V_MODE_RC_DIRECT)"/>
        <call fun="stabilization_mode_changed(STABILIZATION_MODE_ATTITUDE, STABILIZATION_ATT_SUBMODE_HEADING)"/>
      </on_enter>
      <control freq="NAVIGATION_FREQUENCY">
        <call fun="nav_periodic_task()"/>
      </control>
      <control>
        <call_block name="run_attitude_fully_actuated"/>
        <call_block name="set_commands"/>
      </control>
      <exception cond="RadioControlIsLost()" deroute="FAILSAFE"/>
    </mode>

    <mode name="ATTITUDE_Z_HOLD" shortname="A_ZH">
      <on_enter>
        <call fun="guidance_h_mode_changed(GUIDANCE_H_MODE_NONE)"/>
        <call fun="guidance_v_mode_changed(GUIDANCE_V_MODE_HOVER)"/>
        <call fun="stabilization_mode_changed(STABILIZATION_MODE_ATTITUDE, STABILIZATION_ATT_SUBMODE_HEADING)"/>
      </on_enter>
      <control freq="NAVIGATION_FREQUENCY">
        <call fun="nav_periodic_task()"/>
      </control>
      <control>
        <call_block name="run_attitude_control"/>
        <call_block name="set_commands"/>
      </control>
      <exception cond="RadioControlIsLost()" deroute="FAILSAFE"/>
    </mode>

    <mode name="NAV">
      <on_enter>
        <call fun="guidance_h_mode_changed(GUIDANCE_H_MODE_NAV)"/>
        <call fun="guidance_v_mode_changed(GUIDANCE_V_MODE_NAV)"/>
        <call fun="stabilization_mode_changed(STABILIZATION_MODE_ATTITUDE, STABILIZATION_ATT_SUBMODE_HEADING)"/>
      </on_enter>
      <control freq="NAVIGATION_FREQUENCY">
        <call fun="nav_periodic_task()"/>
      </control>
      <control>
        <call_block name="run_guidance_control"/>
        <call_block name="set_commands"/>
      </control>
      <exception cond="GpsIsLost() && autopilot_in_flight()" deroute="FAILSAFE"/>
    </mode>

    <mode name="GUIDED">
      <on_enter>
        <call fun="guidance_h_mode_changed(GUIDANCE_H_MODE_GUIDED)"/>
        <call fun="guidance_v_mode_changed(GUIDANCE_V_MODE_GUIDED)"/>
        <call fun="stabilization_mode_changed(STABILIZATION_MODE_ATTITUDE, STABILIZATION_ATT_SUBMODE_HEADING)"/>
      </on_enter>
      <control freq="NAVIGATION_FREQUENCY">
        <call fun="nav_periodic_task()"/>
      </control>
      <control>
        <call_block name="run_guidance_control"/>
        <call_block name="set_commands"/>
      </control>
      <exception cond="GpsIsLost() && autopilot_in_flight()" deroute="FAILSAFE"/>
    </mode>

    <mode name="DIRECT" shortname="DIR">
      <on_enter>
        <call fun="guidance_h_mode_changed(GUIDANCE_H_MODE_NONE)"/>
        <call fun="guidance_v_mode_changed(GUIDANCE_V_MODE_KILL)"/>
        <call fun="stabilization_mode_changed(STABILIZATION_MODE_NONE, STABILIZATION_ATT_SUBMODE_HEADING)"/>
      </on_enter>
      <control freq="NAVIGATION_FREQUENCY">
        <call fun="nav_periodic_task()"/>
      </control>
      <control>
        <call fun="SetCommandsFromRC(commands, radio_control.values)"/>
      </control>
      <exception cond="RadioControlIsLost()" deroute="FAILSAFE"/>
    </mode>

    <mode name="HOME">
      <on_enter>
        <call fun="guidance_h_mode_changed(GUIDANCE_H_MODE_NAV)"/>
        <call fun="guidance_v_mode_changed(GUIDANCE_V_MODE_NAV)"/>
        <call fun="stabilization_mode_changed(STABILIZATION_MODE_ATTITUDE, STABILIZATION_ATT_SUBMODE_HEADING)"/>
      </on_enter>
      <control freq="NAVIGATION_FREQUENCY">
        <call fun="nav_home()"/>
      </control>
      <control>
        <call_block name="run_guidance_control"/>
        <call_block name="set_commands"/>
      </control>
      <exception cond="GpsIsLost()" deroute="FAILSAFE"/>
    </mode>

    <!-- Safe landing -->
    <mode name="FAILSAFE" shortname="FAIL">
      <on_enter>
        <call fun="guidance_h_mode_changed(GUIDANCE_H_MODE_NONE)"/>
        <call fun="guidance_v_mode_changed(GUIDANCE_V_MODE_CLIMB)"/>
        <call fun="stabilization_mode_changed(STABILIZATION_MODE_ATTITUDE, STABILIZATION_ATT_SUBMODE_HEADING)"/>
        <call fun="guidance_v_set_vz(FAILSAFE_DESCENT_SPEED)"/>
      </on_enter>
      <control>
        <call fun="stabilization_get_failsafe_sp()" store="struct StabilizationSetpoint stab_failsafe"/>
        <call fun="guidance_v_run(autopilot_in_flight())" store="struct ThrustSetpoint thrust_sp"/>
        <call fun="stabilization_run(autopilot_in_flight(), &stab_failsafe, &thrust_sp, stabilization.cmd)"/>
        <call_block name="set_commands"/>
      </control>
      <exception cond="!GpsIsLost()" deroute="$LAST_MODE"/>
    </mode>

    <!-- Kill throttle mode -->
    <mode name="KILL">
      <select cond="$DEFAULT_MODE"/>
      <select cond="kill_switch_is_on()"/>
      <on_enter>
        <call fun="guidance_h_mode_changed(GUIDANCE_H_MODE_NONE)"/>
        <call fun="stabilization_mode_changed(STABILIZATION_MODE_NONE, 0)"/>
        <call fun="guidance_v_mode_changed(GUIDANCE_V_MODE_KILL)"/>
        <call fun="autopilot_set_in_flight(false)"/>
        <call fun="autopilot_set_motors_on(false)"/>
        <!--call fun="stabilization.cmd[COMMAND_THRUST] = 0"/-->
      </on_enter>
      <control>
        <call fun="SetCommands(commands_failsafe)"/>
      </control>
    </mode>

  </state_machine>

</autopilot>
