<?xml version="1.0"?>
<?xml-stylesheet type="text/xsl" href="http://jsbsim.sourceforge.net/JSBSim.xsl"?>
<fdm_config name="FA Hex" version="2.0" release="BETA" xmlns:xsi="http://www.w3.org/2001/XMLSchema-instance" xsi:noNamespaceSchemaLocation="http://jsbsim.sourceforge.net/JSBSim.xsd">

  <fileheader>
    <author>Gautier HAattenberger</author>
    <filecreationdate>2026</filecreationdate>
    <version>Version 1.0</version>
    <description>
      Hexacopter with tilted motors
    </description>
  </fileheader>

  <metrics>
    <wingarea unit="M2"> 1 </wingarea>
    <wingspan unit="M"> 1 </wingspan>
    <chord unit="M"> 1 </chord>
    <htailarea unit="M2"> 0 </htailarea>
    <htailarm unit="M"> 0 </htailarm>
    <vtailarea unit="M2"> 0 </vtailarea>
    <vtailarm unit="M"> 0 </vtailarm>
    <location name="AERORP" unit="M">
      <x> 0 </x>
      <y> 0 </y>
      <z> 0 </z>
    </location>
    <location name="EYEPOINT" unit="M">
      <x> 0 </x>
      <y> 0 </y>
      <z> 0 </z>
    </location>
    <location name="VRP" unit="M">
      <x> 0 </x>
      <y> 0 </y>
      <z> 0 </z>
    </location>
  </metrics>

  <mass_balance>
    <ixx unit="KG*M2"> 0.00156 </ixx>
    <iyy unit="KG*M2"> 0.00156 </iyy>
    <izz unit="KG*M2"> 0.00216 </izz>
    <ixy unit="KG*M2"> 0. </ixy>
    <ixz unit="KG*M2"> 0. </ixz>
    <iyz unit="KG*M2"> 0. </iyz>
    <emptywt unit="KG"> 0.44 </emptywt>
    <location name="CG" unit="M">
      <x> 0 </x>
      <y> 0 </y>
      <z> 0 </z>
    </location>
  </mass_balance>

  <ground_reactions>
    <!-- This is a fake point, JSBSim struggles with a 4-point ground trim -->
    <contact name="Front_Center" type="BOGEY">
      <location unit="M">
        <x> -0.1 </x>
        <y> 0.0 </y>
        <z> -0.05 </z>
      </location>
      <static_friction>0.8</static_friction>
      <dynamic_friction>0.5</dynamic_friction>
      <rolling_friction>0.02</rolling_friction>
      <spring_coeff unit="N/M"> 3000 </spring_coeff>
      <damping_coeff unit="N/M/SEC"> 100 </damping_coeff>
    </contact>

    <contact name="Aft_Left" type="BOGEY">
      <location unit="M">
        <x> 0.1 </x>
        <y> -0.1 </y>
        <z> -0.05 </z>
      </location>
      <static_friction>0.8</static_friction>
      <dynamic_friction>0.5</dynamic_friction>
      <rolling_friction>0.02</rolling_friction>
      <spring_coeff unit="N/M"> 3000 </spring_coeff>
      <damping_coeff unit="N/M/SEC"> 100 </damping_coeff>
    </contact>

    <contact name="Aft_Right" type="BOGEY">
      <location unit="M">
        <x> 0.1 </x>
        <y> 0.1 </y>
        <z> -0.05 </z>
      </location>
      <static_friction>0.8</static_friction>
      <dynamic_friction>0.5</dynamic_friction>
      <rolling_friction>0.02</rolling_friction>
      <spring_coeff unit="N/M"> 3000 </spring_coeff>
      <damping_coeff unit="N/M/SEC"> 100 </damping_coeff>
    </contact>
  </ground_reactions>

  <flight_control name="actuator_dynamics">

    <property value="15.">fcs/motor_lag</property>
    <property value="50.">fcs/motor_d_filter</property>
    <property value="1.">fcs/g1_gain</property>
    <property value="1.">fcs/g2_gain</property>

    <channel name="filtering">

      <!-- First order filter represents actuator dynamics -->
      <lag_filter name="motor1_lag">
        <input> fcs/motor1 </input>
        <c1> fcs/motor_lag </c1>
        <output> fcs/motor1_lag</output>
      </lag_filter>
      <lag_filter name="motor2_lag">
        <input> fcs/motor2 </input>
        <c1> fcs/motor_lag </c1>
        <output> fcs/motor2_lag</output>
      </lag_filter>
      <lag_filter name="motor3_lag">
        <input> fcs/motor3 </input>
        <c1> fcs/motor_lag </c1>
        <output> fcs/motor3_lag</output>
      </lag_filter>
      <lag_filter name="motor4_lag">
        <input> fcs/motor4 </input>
        <c1> fcs/motor_lag </c1>
        <output> fcs/motor4_lag</output>
      </lag_filter>
      <lag_filter name="motor5_lag">
        <input> fcs/motor5 </input>
        <c1> fcs/motor_lag </c1>
        <output> fcs/motor5_lag</output>
      </lag_filter>
      <lag_filter name="motor6_lag">
        <input> fcs/motor6 </input>
        <c1> fcs/motor_lag </c1>
        <output> fcs/motor6_lag</output>
      </lag_filter>

      <!-- Derivative of actuator dynamics for spin-up torque -->
      <washout_filter name="motor1_d">
        <input> fcs/motor1 </input>
        <c1> fcs/motor_d_filter </c1>
        <output> fcs/motor1_d</output>
      </washout_filter>
      <washout_filter name="motor2_d">
        <input> fcs/motor2 </input>
        <c1> fcs/motor_d_filter </c1>
        <output> fcs/motor2_d</output>
      </washout_filter>
      <washout_filter name="motor3_d">
        <input> fcs/motor3 </input>
        <c1> fcs/motor_d_filter </c1>
        <output> fcs/motor3_d</output>
      </washout_filter>
      <washout_filter name="motor4_d">
        <input> fcs/motor4 </input>
        <c1> fcs/motor_d_filter </c1>
        <output> fcs/motor4_d</output>
      </washout_filter>
      <washout_filter name="motor5_d">
        <input> fcs/motor5 </input>
        <c1> fcs/motor_d_filter </c1>
        <output> fcs/motor5_d</output>
      </washout_filter>
      <washout_filter name="motor6_d">
        <input> fcs/motor6 </input>
        <c1> fcs/motor_d_filter </c1>
        <output> fcs/motor6_d</output>
      </washout_filter>

      <!-- Gain and summation for yaw control -->
      <pure_gain name="motor1_g2timesactd">
        <input>fcs/motor1_d</input>
        <gain>fcs/g2_gain</gain>
        <output>fcs/motor1_g2timesactd</output>
      </pure_gain>
      <pure_gain name="motor1_g1timesact">
        <input>fcs/motor1_lag</input>
        <gain>fcs/g1_gain</gain>
        <output>fcs/motor1_g1timesact</output>
      </pure_gain>
      <summer name="motor1_summer">
        <input>fcs/motor1_g2timesactd</input>
        <input>fcs/motor1_g1timesact</input>
        <output>fcs/motor1_yawcontrol</output>
      </summer>

      <pure_gain name="motor2_g2timesactd">
        <input>fcs/motor2_d</input>
        <gain>fcs/g2_gain</gain>
        <output>fcs/motor2_g2timesactd</output>
      </pure_gain>
      <pure_gain name="motor2_g1timesact">
        <input>fcs/motor2_lag</input>
        <gain>fcs/g1_gain</gain>
        <output>fcs/motor2_g1timesact</output>
      </pure_gain>
      <summer name="motor2_summer">
        <input>fcs/motor2_g2timesactd</input>
        <input>fcs/motor2_g1timesact</input>
        <output>fcs/motor2_yawcontrol</output>
      </summer>

      <pure_gain name="motor3_g2timesactd">
        <input>fcs/motor3_d</input>
        <gain>fcs/g2_gain</gain>
        <output>fcs/motor3_g2timesactd</output>
      </pure_gain>
      <pure_gain name="motor3_g1timesact">
        <input>fcs/motor3_lag</input>
        <gain>fcs/g1_gain</gain>
        <output>fcs/motor3_g1timesact</output>
      </pure_gain>
      <summer name="motor3_summer">
        <input>fcs/motor3_g2timesactd</input>
        <input>fcs/motor3_g1timesact</input>
        <output>fcs/motor3_yawcontrol</output>
      </summer>

      <pure_gain name="motor4_g2timesactd">
        <input>fcs/motor4_d</input>
        <gain>fcs/g2_gain</gain>
        <output>fcs/motor4_g2timesactd</output>
      </pure_gain>
      <pure_gain name="motor4_g1timesact">
        <input>fcs/motor4_lag</input>
        <gain>fcs/g1_gain</gain>
        <output>fcs/motor4_g1timesact</output>
      </pure_gain>
      <summer name="motor4_summer">
        <input>fcs/motor4_g2timesactd</input>
        <input>fcs/motor4_g1timesact</input>
        <output>fcs/motor4_yawcontrol</output>
      </summer>

      <pure_gain name="motor5_g2timesactd">
        <input>fcs/motor5_d</input>
        <gain>fcs/g2_gain</gain>
        <output>fcs/motor5_g2timesactd</output>
      </pure_gain>
      <pure_gain name="motor5_g1timesact">
        <input>fcs/motor5_lag</input>
        <gain>fcs/g1_gain</gain>
        <output>fcs/motor5_g1timesact</output>
      </pure_gain>
      <summer name="motor5_summer">
        <input>fcs/motor5_g2timesactd</input>
        <input>fcs/motor5_g1timesact</input>
        <output>fcs/motor5_yawcontrol</output>
      </summer>

      <pure_gain name="motor6_g2timesactd">
        <input>fcs/motor6_d</input>
        <gain>fcs/g2_gain</gain>
        <output>fcs/motor6_g2timesactd</output>
      </pure_gain>
      <pure_gain name="motor6_g1timesact">
        <input>fcs/motor6_lag</input>
        <gain>fcs/g1_gain</gain>
        <output>fcs/motor6_g1timesact</output>
      </pure_gain>
      <summer name="motor6_summer">
        <input>fcs/motor6_g2timesactd</input>
        <input>fcs/motor6_g1timesact</input>
        <output>fcs/motor6_yawcontrol</output>
      </summer>
    </channel>
</flight_control>


 <external_reactions>

    <property>fcs/motor1</property>
    <property>fcs/motor2</property>
    <property>fcs/motor3</property>
    <property>fcs/motor4</property>
    <property>fcs/motor5</property>
    <property>fcs/motor6</property>
    <property>fcs/motor1_lag</property>
    <property>fcs/motor2_lag</property>
    <property>fcs/motor3_lag</property>
    <property>fcs/motor4_lag</property>
    <property>fcs/motor5_lag</property>
    <property>fcs/motor6_lag</property>

    <property value="4.">fcs/max_thrust</property>
    <property value="0.01">fcs/max_torque</property>

    <!-- First the lift forces produced by each propeller -->

    <force name="motor1" frame="BODY">
      <function>
        <product>
          <property>fcs/motor1_lag</property>
          <property>fcs/max_thrust</property>
          <value>0.224808943</value>
        </product>
      </function>
      <location unit="M">
        <x>0.0866</x>  <!-- BL 0.1 m * cos(30°) -->
        <y>-0.05</y>   <!-- BL 0.1 m * sin(30°) -->
        <z>0</z>
      </location>
      <direction>
        <x>0.25</x>     <!-- sin(30°) * sin(30°) -->
        <y>-0.433</y>   <!-- sin(30°) * cos(30°) -->
        <z>-0.866</z>   <!-- cos(30°) -->
      </direction>
    </force>

    <force name="motor2" frame="BODY">
      <function>
        <product>
          <property>fcs/motor2_lag</property>
          <property>fcs/max_thrust</property>
          <value>0.224808943</value>
        </product>
      </function>
      <location unit="M">
        <x>0.0</x>
        <y>-0.1</y>
        <z>0</z>
      </location>
      <direction>
        <x>-0.5</x>    <!-- sin(30°) * sin(90°) -->
        <y>0</y>       <!-- sin(30°) * cos(90°) -->
        <z>-0.866</z>  <!-- cos(30°) -->
      </direction>
    </force>

    <force name="motor3" frame="BODY">
      <function>
        <product>
          <property>fcs/motor3_lag</property>
          <property>fcs/max_thrust</property>
          <value>0.224808943</value>
        </product>
      </function>
      <location unit="M">
        <x>-0.0866</x>
        <y>-0.05</y>
        <z>0</z>
      </location>
      <direction>
        <x>0.25</x>    <!-- sin(30°) * sin(30°) -->
        <y>0.433</y>   <!-- sin(30°) * cos(30°) -->
        <z>-0.866</z>  <!-- cos(30°) -->
      </direction>
    </force>

    <force name="motor4" frame="BODY">
      <function>
        <product>
          <property>fcs/motor4_lag</property>
          <property>fcs/max_thrust</property>
          <value>0.224808943</value>
        </product>
      </function>
      <location unit="M">
        <x>-0.0866</x>
        <y>0.05</y>
        <z>0</z>
      </location>
      <direction>
        <x>0.25</x>    <!-- sin(30°) * sin(30°) -->
        <y>-0.433</y>   <!-- sin(30°) * cos(30°) -->
        <z>-0.866</z>  <!-- cos(30°) -->
      </direction>
    </force>

    <force name="motor5" frame="BODY">
      <function>
        <product>
          <property>fcs/motor5_lag</property>
          <property>fcs/max_thrust</property>
          <value>0.224808943</value>
        </product>
      </function>
      <location unit="M">
        <x>0</x>
        <y>0.1</y>
        <z>0</z>
      </location>
      <direction>
        <x>-0.5</x>    <!-- sin(30°) * sin(90°) -->
        <y>0</y>       <!-- sin(30°) * cos(90°) -->
        <z>-0.866</z>  <!-- cos(30°) -->
      </direction>
    </force>

    <force name="motor6" frame="BODY">
      <function>
        <product>
          <property>fcs/motor6_lag</property>
          <property>fcs/max_thrust</property>
          <value>0.224808943</value>
        </product>
      </function>
      <location unit="M">
        <x>0.0866</x>
        <y>0.05</y>
        <z>0</z>
      </location>
      <direction>
        <x>0.25</x>    <!-- sin(30°) * sin(30°) -->
        <y>0.433</y>   <!-- sin(30°) * cos(30°) -->
        <z>-0.866</z>  <!-- cos(30°) -->
      </direction>
    </force>

    <!-- Then the Moment Couples -->

    <moment name="motor1_couple" frame="BODY">
      <function>
        <product>
          <property>fcs/motor1_yawcontrol</property>
          <property> fcs/max_torque </property>
          <value> 0.738 </value> <!-- N.m to FT.LBS -->
        </product>
      </function>
      <location unit="M">
        <x>0.0866</x>
        <y>-0.05</y>
        <z>0</z>
      </location>
      <direction>
        <x>-0.25</x>
        <y>0.433</y>
        <z>0.866</z>
      </direction>
    </moment>

    <moment name="motor2_couple" frame="BODY">
      <function>
        <product>
          <property>fcs/motor2_yawcontrol</property>
          <property> fcs/max_torque </property>
          <value> 0.738 </value> <!-- N.m to FT.LBS -->
        </product>
      </function>
      <location unit="M">
        <x>0.0</x>
        <y>-0.1</y>
        <z>0</z>
      </location>
      <direction>
        <x>-0.5</x>
        <y>0</y>
        <z>-0.866</z>
      </direction>
    </moment>

    <moment name="motor3_couple" frame="BODY">
      <function>
        <product>
          <property>fcs/motor3_yawcontrol</property>
          <property> fcs/max_torque </property>
          <value> 0.738 </value> <!-- N.m to FT.LBS -->
        </product>
      </function>
      <location unit="M">
        <x>-0.0866</x>
        <y>-0.05</y>
        <z>0</z>
      </location>
      <direction>
        <x>-0.25</x>
        <y>-0.433</y>
        <z>0.866</z>
      </direction>
    </moment>

    <moment name="motor4_couple" frame="BODY">
      <function>
        <product>
          <property>fcs/motor4_yawcontrol</property>
          <property> fcs/max_torque </property>
          <value> 0.738 </value> <!-- N.m to FT.LBS -->
        </product>
      </function>
      <location unit="M">
        <x>-0.0866</x>
        <y>0.05</y>
        <z>0</z>
      </location>
      <direction>
        <x>0.25</x>
        <y>-0.433</y>
        <z>-0.866</z>
      </direction>
    </moment>

    <moment name="motor5_couple" frame="BODY">
      <function>
        <product>
          <property>fcs/motor5_yawcontrol</property>
          <property> fcs/max_torque </property>
          <value> 0.738 </value> <!-- N.m to FT.LBS -->
        </product>
      </function>
      <location unit="M">
        <x>0</x>
        <y>0.1</y>
        <z>0</z>
      </location>
      <direction>
        <x>0.5</x>
        <y>0</y>
        <z>0.866</z>
      </direction>
    </moment>

    <moment name="motor6_couple" frame="BODY">
      <function>
        <product>
          <property>fcs/motor6_yawcontrol</property>
          <property> fcs/max_torque </property>
          <value> 0.738 </value> <!-- N.m to FT.LBS -->
        </product>
      </function>
      <location unit="M">
        <x>0.0866</x>
        <y>0.05</y>
        <z>0</z>
      </location>
      <direction>
        <x>0.25</x>
        <y>0.433</y>
        <z>-0.866</z>
      </direction>
    </moment>

  </external_reactions>

  <propulsion/>

  <flight_control name="FGFCS"/>

  <aerodynamics>
    <axis name="DRAG">
      <function name="aero/coefficient/CD">
        <description>Drag</description>
        <product>
          <property>velocities/vtrue-fps</property>
          <value>0.3048</value> <!-- conversion in m/s -->
          <value>0.230292</value> <!-- drag coef -->
          <value>0.224808943</value> <!-- N to LBS -->
        </product>
      </function>
    </axis>
  </aerodynamics>

</fdm_config>
