<?xml version="1.0"?>
<?xml-stylesheet type="text/xsl" href="http://jsbsim.sourceforge.net/JSBSim.xsl"?>
<fdm_config name="QUAD ANTON" version="2.0" release="BETA" xmlns:xsi="http://www.w3.org/2001/XMLSchema-instance" xsi:noNamespaceSchemaLocation="http://jsbsim.sourceforge.net/JSBSim.xsd">

  <fileheader>
    <author>Gautier Hattenberger</author>
    <filecreationdate>05-06-2023</filecreationdate>
    <version>Version 1.0</version>
    <description>
      Model for ANTON quadrotor
      Simple Quadrotor in X configuration
      Motor: T-Motor F40 + prop 6045
      Include rotor dynamic
      NE/SW turning CCW, NW/SE CW

      Drag model is linear with speed and correspond to the quadrotor used in
      IMAV2021 paper "Estimating wind using a quadrotor" (Hattenberger, Bronz, Condomines)
    </description>
  </fileheader>

  <metrics>
    <wingarea unit="M2"> 1 </wingarea>
    <wingspan unit="M"> 1 </wingspan>
    <chord unit="M"> 1 </chord>
    <htailarea unit="M2"> 0 </htailarea>
    <htailarm unit="M"> 0 </htailarm>
    <vtailarea unit="M2"> 0 </vtailarea>
    <vtailarm unit="M"> 0 </vtailarm>
    <location name="AERORP" unit="M">
      <x> 0 </x>
      <y> 0 </y>
      <z> 0 </z>
    </location>
    <location name="EYEPOINT" unit="M">
      <x> 0 </x>
      <y> 0 </y>
      <z> 0 </z>
    </location>
    <location name="VRP" unit="M">
      <x> 0 </x>
      <y> 0 </y>
      <z> 0 </z>
    </location>
  </metrics>

  <mass_balance>
    <ixx unit="KG*M2"> 0.0068 </ixx>
    <iyy unit="KG*M2"> 0.0068 </iyy>
    <izz unit="KG*M2"> 0.0136 </izz>
    <ixy unit="KG*M2"> 0. </ixy>
    <ixz unit="KG*M2"> 0. </ixz>
    <iyz unit="KG*M2"> 0. </iyz>
    <emptywt unit="KG"> 0.8 </emptywt>
    <location name="CG" unit="M">
      <x> 0 </x>
      <y> 0 </y>
      <z> 0 </z>
    </location>
  </mass_balance>

  <ground_reactions>
    <contact type="STRUCTURE" name="CONTACT_FRONT">
      <location unit="M">
        <x>-0.25 </x>
        <y> 0 </y>
        <z>-0.1 </z>
      </location>
      <static_friction>  0.8 </static_friction>
      <dynamic_friction> 0.5 </dynamic_friction>
      <spring_coeff unit="N/M"> 500 </spring_coeff>
      <damping_coeff unit="N/M/SEC"> 100 </damping_coeff>
      <damping_coeff_rebound type="SQUARE" unit="N/M2/SEC2"> 1000 </damping_coeff_rebound>
      <max_steer unit="DEG"> 0.0 </max_steer>
      <brake_group> NONE </brake_group>
      <retractable>0</retractable>
    </contact>

    <contact type="STRUCTURE" name="CONTACT_BACK">
      <location unit="M">
        <x> 0.25</x>
        <y> 0   </y>
        <z>-0.1 </z>
      </location>
      <static_friction>  0.8 </static_friction>
      <dynamic_friction> 0.5 </dynamic_friction>
      <spring_coeff unit="N/M"> 500 </spring_coeff>
      <damping_coeff unit="N/M/SEC"> 100 </damping_coeff>
      <damping_coeff_rebound type="SQUARE" unit="N/M2/SEC2"> 1000 </damping_coeff_rebound>
      <max_steer unit="DEG"> 0.0 </max_steer>
      <brake_group> NONE </brake_group>
      <retractable>0</retractable>
    </contact>

    <contact type="STRUCTURE" name="CONTACT_RIGHT">
      <location unit="M">
        <x> 0.  </x>
        <y> 0.25</y>
        <z>-0.1 </z>
      </location>
      <static_friction>  0.8 </static_friction>
      <dynamic_friction> 0.5 </dynamic_friction>
      <spring_coeff unit="N/M"> 500 </spring_coeff>
      <damping_coeff unit="N/M/SEC"> 100 </damping_coeff>
      <damping_coeff_rebound type="SQUARE" unit="N/M2/SEC2"> 1000 </damping_coeff_rebound>
      <max_steer unit="DEG"> 0.0 </max_steer>
      <brake_group> NONE </brake_group>
      <retractable>0</retractable>
    </contact>

    <contact type="STRUCTURE" name="CONTACT_LEFT">
      <location unit="M">
        <x> 0.  </x>
        <y>-0.25</y>
        <z>-0.1 </z>
      </location>
      <static_friction>  0.8 </static_friction>
      <dynamic_friction> 0.5 </dynamic_friction>
      <spring_coeff unit="N/M"> 500 </spring_coeff>
      <damping_coeff unit="N/M/SEC"> 100 </damping_coeff>
      <damping_coeff_rebound type="SQUARE" unit="N/M2/SEC2"> 1000 </damping_coeff_rebound>
      <max_steer unit="DEG"> 0.0 </max_steer>
      <brake_group> NONE </brake_group>
      <retractable>0</retractable>
    </contact>
  </ground_reactions>

  <flight_control name="actuator_dynamics">

    <property value="30.">fcs/motor_lag</property>
    <property value="50.">fcs/motor_d_filter</property>
    <property value="1.">fcs/g1_gain</property>
    <property value="1.">fcs/g2_gain</property>

    <channel name="filtering">

      <!--First order filter represents actuator dynamics-->
      <lag_filter name="ne_motor_lag">
        <input> fcs/ne_motor </input>
        <c1> fcs/motor_lag </c1>
        <output> fcs/ne_motor_lag</output>
      </lag_filter>
      <lag_filter name="se_motor_lag">
        <input> fcs/se_motor </input>
        <c1> fcs/motor_lag </c1>
        <output> fcs/se_motor_lag</output>
      </lag_filter>
      <lag_filter name="sw_motor_lag">
        <input> fcs/sw_motor </input>
        <c1> fcs/motor_lag </c1>
        <output> fcs/sw_motor_lag</output>
      </lag_filter>
      <lag_filter name="nw_motor_lag">
        <input> fcs/nw_motor </input>
        <c1> fcs/motor_lag </c1>
        <output> fcs/nw_motor_lag</output>
      </lag_filter>

      <!--Derivative of actuator dynamics for spinup torque-->
      <washout_filter name="ne_motor_d">
        <input> fcs/ne_motor </input>
        <c1> fcs/motor_d_filter </c1>
        <output> fcs/ne_motor_d</output>
      </washout_filter>
      <washout_filter name="se_motor_d">
        <input> fcs/se_motor </input>
        <c1> fcs/motor_d_filter </c1>
        <output> fcs/se_motor_d</output>
      </washout_filter>
      <washout_filter name="sw_motor_d">
        <input> fcs/sw_motor </input>
        <c1> fcs/motor_d_filter </c1>
        <output> fcs/sw_motor_d</output>
      </washout_filter>
      <washout_filter name="nw_motor_d">
        <input> fcs/nw_motor </input>
        <c1> fcs/motor_d_filter </c1>
        <output> fcs/nw_motor_d</output>
      </washout_filter>

      <pure_gain name="ne_g2timesactd">
        <input>fcs/ne_motor_d</input>
        <gain>fcs/g2_gain</gain>
        <output>fcs/ne_g2timesactd</output>
      </pure_gain>
      <pure_gain name="ne_g1timesact">
        <input>fcs/ne_motor_lag</input>
        <gain>fcs/g1_gain</gain>
        <output>fcs/ne_g1timesact</output>
      </pure_gain>
      <summer name="ne_summer">
        <input>fcs/ne_g2timesactd</input>
        <input>fcs/ne_g1timesact</input>
        <output>fcs/ne_yawcontrol</output>
      </summer>

      <pure_gain name="se_g2timesactd">
        <input>fcs/se_motor_d</input>
        <gain>fcs/g2_gain</gain>
        <output>fcs/se_g2timesactd</output>
      </pure_gain>
      <pure_gain name="se_g1timesact">
        <input>fcs/se_motor_lag</input>
        <gain>fcs/g1_gain</gain>
        <output>fcs/se_g1timesact</output>
      </pure_gain>
      <summer name="se_summer">
        <input>fcs/se_g2timesactd</input>
        <input>fcs/se_g1timesact</input>
        <output>fcs/se_yawcontrol</output>
      </summer>

      <pure_gain name="sw_g2timesactd">
        <input>fcs/sw_motor_d</input>
        <gain>fcs/g2_gain</gain>
        <output>fcs/sw_g2timesactd</output>
      </pure_gain>
      <pure_gain name="sw_g1timesact">
        <input>fcs/sw_motor_lag</input>
        <gain>fcs/g1_gain</gain>
        <output>fcs/sw_g1timesact</output>
      </pure_gain>
      <summer name="sw_summer">
        <input>fcs/sw_g2timesactd</input>
        <input>fcs/sw_g1timesact</input>
        <output>fcs/sw_yawcontrol</output>
      </summer>

      <pure_gain name="nw_g2timesactd">
        <input>fcs/nw_motor_d</input>
        <gain>fcs/g2_gain</gain>
        <output>fcs/nw_g2timesactd</output>
      </pure_gain>
      <pure_gain name="nw_g1timesact">
        <input>fcs/nw_motor_lag</input>
        <gain>fcs/g1_gain</gain>
        <output>fcs/nw_g1timesact</output>
      </pure_gain>
      <summer name="summer3">
        <input>fcs/nw_g2timesactd</input>
        <input>fcs/nw_g1timesact</input>
        <output>fcs/nw_yawcontrol</output>
      </summer>

    </channel>
  </flight_control>

  <external_reactions>

    <property>fcs/ne_motor</property>
    <property>fcs/se_motor</property>
    <property>fcs/sw_motor</property>
    <property>fcs/nw_motor</property>
    <property>fcs/ne_motor_lag</property>
    <property>fcs/se_motor_lag</property>
    <property>fcs/sw_motor_lag</property>
    <property>fcs/nw_motor_lag</property>

    <!-- First the lift forces produced by each propeller -->

    <force name="ne_motor" frame="BODY">
      <function>
        <product>
          <property>fcs/ne_motor_lag</property>
          <value> 10. </value>
          <value>0.224808943</value> <!-- N to LBS -->
        </product>
      </function>
      <location unit="M">
        <x>-0.15</x>
        <y>0.15</y>
        <z>0</z>
      </location>
      <direction>
        <x>0</x>
        <y>0</y>
        <z>-1</z>
      </direction>
    </force>

    <force name="sw_motor" frame="BODY">
      <function>
        <product>
          <property>fcs/sw_motor_lag</property>
          <value> 10. </value>
          <value>0.224808943</value> <!-- N to LBS -->
        </product>
      </function>
      <location unit="M">
        <x>0.15</x>
        <y>-0.15</y>
        <z>0</z>
      </location>
      <direction>
        <x>0</x>
        <y>0</y>
        <z>-1</z>
      </direction>
    </force>

    <force name="se_motor" frame="BODY">
      <function>
        <product>
          <property>fcs/se_motor_lag</property>
          <value> 10. </value>
          <value>0.224808943</value> <!-- N to LBS -->
        </product>
      </function>
      <location unit="M">
        <x>0.15</x>
        <y>0.15</y>
        <z>0</z>
      </location>
      <direction>
        <x>0</x>
        <y>0</y>
        <z>-1</z>
      </direction>
    </force>

    <force name="nw_motor" frame="BODY">
      <function>
        <product>
          <property>fcs/nw_motor_lag</property>
          <value> 10. </value>
          <value>0.224808943</value> <!-- N to LBS -->
        </product>
      </function>
      <location unit="M">
        <x>-0.15</x>
        <y>-0.15</y>
        <z>0</z>
      </location>
      <direction>
        <x>0</x>
        <y>0</y>
        <z>-1</z>
      </direction>
    </force>

    <!-- Then the Moment Couples -->

    <moment name="ne_couple" frame="BODY">
      <function>
        <product>
          <property>fcs/ne_yawcontrol</property>
          <value> 0.5 </value>
          <value> 0.738 </value> <!-- N.m to FT.LBS -->
        </product>
      </function>
      <location unit="M">
        <x>-0.15</x>
        <y>0.15</y>
        <z>0</z>
      </location>
      <direction>
        <x>0</x>
        <y>0</y>
        <z>1</z>
      </direction>
    </moment>

    <moment name="sw_couple" frame="BODY">
      <function>
        <product>
          <property>fcs/sw_yawcontrol</property>
          <value> 0.5 </value>
          <value> 0.738 </value> <!-- N.m to FT.LBS -->
        </product>
      </function>
      <location unit="M">
        <x>0.15</x>
        <y>-0.15</y>
        <z>0</z>
      </location>
      <direction>
        <x>0</x>
        <y>0</y>
        <z>1</z>
      </direction>
    </moment>

    <moment name="se_couple" frame="BODY">
      <function>
        <product>
          <property>fcs/se_yawcontrol</property>
          <value> 0.5 </value>
          <value> 0.738 </value> <!-- N.m to FT.LBS -->
        </product>
      </function>
      <location unit="M">
        <x>0.15</x>
        <y>0.15</y>
        <z>0</z>
      </location>
      <direction>
        <x>0</x>
        <y>0</y>
        <z>-1</z>
      </direction>
    </moment>

    <moment name="nw_couple" frame="BODY">
      <function>
        <product>
          <property>fcs/nw_yawcontrol</property>
          <value> 0.5 </value>
          <value> 0.738 </value> <!-- N.m to FT.LBS -->
        </product>
      </function>
      <location unit="M">
        <x>-0.15</x>
        <y>-0.15</y>
        <z>0</z>
      </location>
      <direction>
        <x>0</x>
        <y>0</y>
        <z>-1</z>
      </direction>
    </moment>

  </external_reactions>

  <propulsion/>

  <flight_control name="FGFCS"/>

  <aerodynamics>
    <axis name="DRAG">
      <function name="aero/coefficient/CD">
        <description>Drag</description>
        <product>
          <property>velocities/vtrue-fps</property>
          <value>0.3048</value> <!-- conversion in m/s -->
          <value>0.230292</value> <!-- drag coef -->
          <value>0.224808943</value> <!-- N to LBS -->
        </product>
      </function>
    </axis>
  </aerodynamics>

</fdm_config>
