<?xml version="1.0"?>
<?xml-stylesheet type="text/xsl" href="http://jsbsim.sourceforge.net/JSBSim.xsl"?>
<fdm_config name="QUAD COMPLETE EXT" version="2.0" release="BETA" xmlns:xsi="http://www.w3.org/2001/XMLSchema-instance" xsi:noNamespaceSchemaLocation="http://jsbsim.sourceforge.net/JSBSim.xsd">

  <fileheader>
    <author>ENAC</author>
    <filecreationdate>23-01-2025</filecreationdate>
    <version>1.0</version>
    <description>Heewing Ranger T1 VTOL</description>
  </fileheader>

  <metrics>
    <wingarea unit="M2"> 0.075 </wingarea>
    <wingspan unit="M"> 0.9 </wingspan>
    <chord unit="M"> 0.12 </chord>
    <htailarea unit="M2"> 0 </htailarea>
    <htailarm unit="M"> 0 </htailarm>
    <vtailarea unit="M2"> 0 </vtailarea>
    <vtailarm unit="M"> 0 </vtailarm>
    <wing_incidence unit="DEG"> 90 </wing_incidence>
    <location name="AERORP" unit="M">
      <x> 0 </x>
      <y> 0 </y>
      <z> 0 </z>
    </location>
    <location name="EYEPOINT" unit="M">
      <x> 0 </x>
      <y> 0 </y>
      <z> 0 </z>
    </location>
    <location name="VRP" unit="M">
      <x> 0 </x>
      <y> 0 </y>
      <z> 0 </z>
    </location>
  </metrics>

  <mass_balance>
    <ixx unit="KG*M2"> 0.005 </ixx>
    <iyy unit="KG*M2"> 0.005  </iyy>
    <izz unit="KG*M2"> 0.015 </izz>
    <ixy unit="KG*M2"> 0. </ixy>
    <ixz unit="KG*M2"> 0. </ixz>
    <iyz unit="KG*M2"> 0. </iyz>
    <emptywt unit="KG"> 0.72 </emptywt>
    <location name="CG" unit="M">
      <x> 0 </x>
      <y> 0 </y>
      <z> 0 </z>
    </location>
  </mass_balance>

  <ground_reactions>
    <contact type="STRUCTURE" name="CONTACT_FRONT">
      <location unit="M">
        <x> -0.12 </x>
        <y> 0.0 </y>
        <z>-0.1 </z>
      </location>
      <static_friction>  0.8 </static_friction>
      <dynamic_friction> 0.5 </dynamic_friction>
      <spring_coeff unit="N/M"> 500 </spring_coeff>
      <damping_coeff unit="N/M/SEC"> 100 </damping_coeff>
      <damping_coeff_rebound type="SQUARE" unit="N/M2/SEC2"> 1000 </damping_coeff_rebound>
      <max_steer unit="DEG"> 0.0 </max_steer>
      <brake_group> NONE </brake_group>
      <retractable>0</retractable>
    </contact>

    <contact type="STRUCTURE" name="CONTACT_BACK">
      <location unit="M">
        <x>  0.12</x>
        <y>  0.0</y>
        <z> -0.1</z>
      </location>
      <static_friction>  0.8 </static_friction>
      <dynamic_friction> 0.5 </dynamic_friction>
      <spring_coeff unit="N/M"> 500 </spring_coeff>
      <damping_coeff unit="N/M/SEC"> 100 </damping_coeff>
      <damping_coeff_rebound type="SQUARE" unit="N/M2/SEC2"> 1000 </damping_coeff_rebound>
      <max_steer unit="DEG"> 0.0 </max_steer>
      <brake_group> NONE </brake_group>
      <retractable>0</retractable>
    </contact>

    <contact type="STRUCTURE" name="CONTACT_RIGHT">
      <location unit="M">
        <x> 0.0  </x>
        <y> 0.12</y>
        <z> -0.1 </z>
      </location>
      <static_friction>  0.8 </static_friction>
      <dynamic_friction> 0.5 </dynamic_friction>
      <spring_coeff unit="N/M"> 500 </spring_coeff>
      <damping_coeff unit="N/M/SEC"> 100 </damping_coeff>
      <damping_coeff_rebound type="SQUARE" unit="N/M2/SEC2"> 1000 </damping_coeff_rebound>
      <max_steer unit="DEG"> 0.0 </max_steer>
      <brake_group> NONE </brake_group>
      <retractable>0</retractable>
    </contact>

    <contact type="STRUCTURE" name="CONTACT_LEFT">
      <location unit="M">
        <x> 0.0  </x>
        <y>-0.12</y>
        <z> -0.1 </z>
      </location>
      <static_friction>  0.8 </static_friction>
      <dynamic_friction> 0.5 </dynamic_friction>
      <spring_coeff unit="N/M"> 500 </spring_coeff>
      <damping_coeff unit="N/M/SEC"> 100 </damping_coeff>
      <damping_coeff_rebound type="SQUARE" unit="N/M2/SEC2"> 1000 </damping_coeff_rebound>
      <max_steer unit="DEG"> 0.0 </max_steer>
      <brake_group> NONE </brake_group>
      <retractable>0</retractable>
    </contact>
  </ground_reactions>

  <flight_control name="actuator_dynamics">
    <property value="30.">fcs/motor_lag</property>
    <property value="54.">fcs/servo_lag</property>
    <property value="0.">fcs/tilt_min_rad</property>
    <property value="1.74533">fcs/tilt/tilt_max_rad</property> <!-- 100 deg -->

    <channel name="filtering">
      <!--First order filter represents actuator dynamics-->
      <lag_filter name="motor_right_lag">
        <input> fcs/motor_right </input>
        <clipto>
            <min>0</min>
            <max>1</max>
        </clipto>
        <c1> fcs/motor_lag </c1>
        <output> fcs/motor_right_lag</output>
      </lag_filter>
      <lag_filter name="motor_left_lag">
        <input> fcs/motor_left </input>
        <clipto>
            <min>0</min>
            <max>1</max>
        </clipto>
        <c1> fcs/motor_lag </c1>
        <output> fcs/motor_left_lag</output>
      </lag_filter>
      <lag_filter name="motor_back_lag">
        <input> fcs/motor_back </input>
        <clipto>
            <min>0</min>
            <max>1</max>
        </clipto>
        <c1> fcs/motor_lag </c1>
        <output> fcs/motor_back_lag</output>
      </lag_filter>

      <lag_filter name="aileron_lag">
        <input> fcs/aileron </input>
        <c1> fcs/servo_lag </c1>
        <output> fcs/aileron_lag</output>
      </lag_filter>
      <lag_filter name="elevator_lag">
        <input> fcs/elevator </input>
        <c1> fcs/servo_lag </c1>
        <output> fcs/elevator_lag</output>
      </lag_filter>

    </channel>

    <channel name="tilt">
      <aerosurface_scale name="tilt_right">
        <input> fcs/tilt_right </input>
        <zero_centered> false </zero_centered>
        <domain>
          <min> 0. </min>
          <max> 1. </max>
        </domain>
        <range>
          <min> fcs/tilt_min_rad </min>
          <max> fcs/tilt_max_rad </max>
        </range>
        <output> fcs/tilt_right_rad </output>
      </aerosurface_scale >
      <actuator name="tilt_right_output">
        <input> fcs/tilt_right_rad </input>
        <rate_limit> 3.5 </rate_limit> <!-- 200 degrees/sec -->
        <clipto>
          <min> fcs/tilt_min_rad </min>
          <max> fcs/tilt_max_rad </max>
        </clipto>
        <output> fcs/tilt_right_lag </output>
      </actuator>
      <fcs_function name="tilt_right_pos_x">
        <function>
          <sum>
            <value> 0.09 </value> <!-- 9cm in front of CG -->
            <product>
              <value> 0.03 </value> <!-- 3cm rotating arm -->
              <cos><property> fcs/tilt_right_lag </property></cos>
            </product>
          </sum>
        </function>
        <output> fcs/tilt_right_pos_x </output>
      </fcs_function>
      <fcs_function name="tilt_right_pos_z">
        <function>
          <product>
            <value> -0.03 </value> <!-- 3cm rotating arm -->
            <sin><property> fcs/tilt_right_lag </property></sin>
          </product>
        </function>
        <output> fcs/tilt_right_pos_z </output>
      </fcs_function>
      <fcs_function name="tilt_right_dir_x">
        <function>
          <cos><property> fcs/tilt_right_lag </property></cos>
        </function>
        <output> fcs/tilt_right_dir_x </output>
      </fcs_function>
      <fcs_function name="tilt_right_dir_z">
        <function>
          <sin><property> -fcs/tilt_right_lag </property></sin>
        </function>
        <output> fcs/tilt_right_dir_z </output>
      </fcs_function>

      <aerosurface_scale name="tilt_left">
        <input> fcs/tilt_left </input>
        <zero_centered> false </zero_centered>
        <domain>
          <min> 0. </min>
          <max> 1. </max>
        </domain>
        <range>
          <min> fcs/tilt_min_rad </min>
          <max> fcs/tilt_max_rad </max>
        </range>
        <output> fcs/tilt_left_rad </output>
      </aerosurface_scale >
      <actuator name="tilt_left_output">
        <input> fcs/tilt_left_rad </input>
        <rate_limit> 3.5 </rate_limit> <!-- 200 degrees/sec -->
        <clipto>
          <min> fcs/tilt_min_rad </min>
          <max> fcs/tilt_max_rad </max>
        </clipto>
        <output> fcs/tilt_left_lag </output>
      </actuator>
      <fcs_function name="tilt_left_pos_x">
        <function>
          <sum>
            <value> 0.09 </value> <!-- 9cm in front of CG -->
            <product>
              <value> 0.03 </value> <!-- 3cm rotating arm -->
              <cos><property> fcs/tilt_left_lag </property></cos>
            </product>
          </sum>
        </function>
        <output> fcs/tilt_left_pos_x </output>
      </fcs_function>
      <fcs_function name="tilt_left_pos_z">
        <function>
          <product>
            <value> -0.03 </value> <!-- 3cm rotating arm -->
            <sin><property> fcs/tilt_left_lag </property></sin>
          </product>
        </function>
        <output> fcs/tilt_left_pos_z </output>
      </fcs_function>
      <fcs_function name="tilt_left_dir_x">
        <function>
          <cos><property> fcs/tilt_left_lag </property></cos>
        </function>
        <output> fcs/tilt_left_dir_x </output>
      </fcs_function>
      <fcs_function name="tilt_left_dir_z">
        <function>
          <sin><property> -fcs/tilt_left_lag </property></sin>
        </function>
        <output> fcs/tilt_left_dir_z </output>
      </fcs_function>
    </channel>

  </flight_control>

  <external_reactions>

    <property>fcs/motor_right</property>
    <property>fcs/motor_left</property>
    <property>fcs/motot_back</property>
    <property>fcs/motor_right_lag</property>
    <property>fcs/motor_left_lag</property>
    <property>fcs/motot_back_lag</property>
    <property>fcs/aileron_left</property>
    <property>fcs/aileron_left_lag</property>
    <property>fcs/aileron_right</property>
    <property>fcs/aileron_right_lag</property>
    <property>fcs/elevator</property>
    <property>fcs/elevator_lag</property>
    <property>fcs/tilt_left</property>
    <property>fcs/tilt_left_lag</property>
    <property>fcs/tilt_right</property>
    <property>fcs/tilt_right_lag</property>

    <property value="6.">fcs/motor_max_thrust</property> <!-- FIXME -->
    <property value="0.00001">fcs/motor_max_torque</property>

    <!-- First the lift forces produced by each propeller -->

    <force name="motor_right" frame="BODY" unit="LBS">
      <function>
        <product>
          <property>fcs/motor_right_lag</property>
          <property>fcs/motor_max_thrust</property>
          <value>0.224808943</value> <!-- N to LBS -->
        </product>
      </function>
      <location unit="M">
        <x> fcs/tilt_right_pos_x </x>
        <y> 0.12 </y>
        <z> fcs/tilt_right_pos_z </z>
      </location>
      <direction>
        <x> fcs/tilt_right_dir_x </x>
        <y> 0 </y>
        <z> fcs/tilt_right_dir_z </z>
      </direction>
    </force>
    <force name="motor_left" frame="BODY" unit="LBS">
      <function>
        <product>
          <property>fcs/motor_left_lag</property>
          <property>fcs/motor_max_thrust</property>
          <value>0.224808943</value> <!-- N to LBS -->
        </product>
      </function>
      <location unit="M">
        <x> fcs/tilt_left_pos_x </x>
        <y> -0.12 </y>
        <z> fcs/tilt_left_pos_z </z>
      </location>
      <direction>
        <x> fcs/tilt_left_dir_x </x>
        <y> 0 </y>
        <z> fcs/tilt_left_dir_z </z>
      </direction>
    </force>
    <force name="motor_back" frame="BODY" unit="LBS">
      <function>
        <product>
          <property>fcs/motor_back_lag</property>
          <property>fcs/motor_max_thrust</property>
          <value>0.224808943</value> <!-- N to LBS -->
        </product>
      </function>
      <location unit="M">
        <x> -0.25 </x>
        <y> 0 </y>
        <z> 0 </z>
      </location>
      <direction>
        <x>0</x>
        <y>0</y>
        <z>-1</z>
      </direction>
    </force>

    <!-- Then the Moment Couples -->

    <moment name="motor_right_couple" frame="BODY">
      <function>
        <product>
          <property>fcs/motor_right_lag</property>
          <property>fcs/motor_max_torque</property>
          <value> 0.738 </value> <!-- N.m to FT.LBS -->
        </product>
      </function>
      <location unit="M">
        <x> fcs/tilt_right_pos_x </x>
        <y> 0.12 </y>
        <z> fcs/tilt_right_pos_z </z>
      </location>
      <direction>
        <x> fcs/tilt_right_dir_x </x>
        <y> 0 </y>
        <z> fcs/tilt_right_dir_z </z>
      </direction>
    </force>

    <moment name="motor_left_couple" frame="BODY">
      <function>
        <product>
          <property>fcs/motor_left_lag</property>
          <property>fcs/motor_max_torque</property>
          <value> 0.738 </value> <!-- N.m to FT.LBS -->
        </product>
      </function>
      <location unit="M">
        <x> fcs/tilt_left_pos_x </x>
        <y> -0.12 </y>
        <z> fcs/tilt_left_pos_z </z>
      </location>
      <direction>
        <x> -fcs/tilt_left_dir_x </x>
        <y> 0 </y>
        <z> -fcs/tilt_left_dir_z </z>
      </direction>
    </moment>

    <moment name="motor_back_couple" frame="BODY">
      <function>
        <product>
          <property>fcs/motor_back_lag</property>
          <property>fcs/motor_max_torque</property>
          <value> 0.738 </value> <!-- N.m to FT.LBS -->
        </product>
      </function>
      <location unit="M">
        <x>-0.25</x>
        <y>0</y>
        <z>0</z>
      </location>
      <direction>
        <x>0</x>
        <y>0</y>
        <z>-1</z>
      </direction>
    </moment>

  </external_reactions>

  <propulsion/>

  <flight_control name="FGFCS"/>
  <aerodynamics file="Systems/aerodynamics_ranger_t1.xml"/>

</fdm_config>
